*Heading
** Job name: Job-1-SemiconductorPackageGlobal Model name: Model-1
** Generated by: Abaqus/CAE Learning Edition 2025
*Preprint, echo=NO, model=NO, history=NO, contact=NO
**
** PARTS
**
*Part, name=Global
*Node
      1,          10.,          10.,          0.5
      2,          10.,           0.,          0.5
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*Element, type=C3D8R
  1,  66, 121, 202,  49,   1,  13,  30,   4
  2, 121, 122, 203, 202,  13,  14,  29,  30
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*Nset, nset=Set-1
   1,   2,   5,   8,   9,  10
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*Elset, elset=Set-1, generate
 101,  200,    1
*Nset, nset=Set-2
   1,   2,   3,   4,   5,   6
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*Elset, elset=Set-2, generate
   1,  100,    1
** Section: dielectricsection
*Solid Section, elset=Set-2, material=dielectric
,
** Section: coresection
*Solid Section, elset=Set-1, material=Core
,
*End Part
**
**
** ASSEMBLY
**
*Assembly, name=Assembly
**
*Instance, name=Global-1, part=Global
*End Instance
**
*Nset, nset=Set-1, instance=Global-1
 3,
*Nset, nset=Set-2, instance=Global-1
 4,
*Nset, nset=Set-3, instance=Global-1
 7,
*Nset, nset=Set-4, instance=Global-1, generate
   1,  363,    1
*Elset, elset=Set-4, instance=Global-1, generate
   1,  200,    1
*Nset, nset=Set-5, instance=Global-1, generate
   1,  363,    1
*Elset, elset=Set-5, instance=Global-1, generate
   1,  200,    1
*Nset, nset=Set-6, instance=Global-1, generate
   1,  363,    1
*Elset, elset=Set-6, instance=Global-1, generate
   1,  200,    1
*Nset, nset=Set-7, instance=Global-1, generate
   1,  363,    1
*Elset, elset=Set-7, instance=Global-1, generate
   1,  200,    1
*Nset, nset=Set-8, instance=Global-1, generate
   1,  363,    1
*Elset, elset=Set-8, instance=Global-1, generate
   1,  200,    1
*End Assembly
**
** MATERIALS
**
*Material, name=Core
*Elastic
70000., 0.22
*Expansion
 3.3e-06,
*Material, name=dielectric
*Elastic
5000., 0.3
*Expansion
 5e-05,
*Material, name=metal_via
*Elastic
110000., 0.34
*Expansion
 1.7e-05,
**
** BOUNDARY CONDITIONS
**
** Name: BC-1 Type: Displacement/Rotation
*Boundary
Set-1, 1, 1
Set-1, 2, 2
Set-1, 3, 3
** Name: BC-2 Type: Displacement/Rotation
*Boundary
Set-2, 2, 2
Set-2, 3, 3
** Name: BC-3 Type: Displacement/Rotation
*Boundary
Set-3, 1, 1
Set-3, 3, 3
**
** PREDEFINED FIELDS
**
** Name: Predefined Field-2   Type: Temperature
*Initial Conditions, type=TEMPERATURE
Set-5, 298.
** ----------------------------------------------------------------
**
** STEP: ramptohot
**
*Step, name=ramptohot, nlgeom=YES
*Static
1., 1., 1e-05, 1.
**
** PREDEFINED FIELDS
**
** Name: Predefined Field-2   Type: Temperature
*Temperature, op=NEW
** Name: Predefined Field-3   Type: Temperature
*Temperature, op=NEW
Set-6, 498.
**
** OUTPUT REQUESTS
**
*Restart, write, frequency=0
**
** FIELD OUTPUT: F-Output-1
**
*Output, field, variable=PRESELECT
**
** HISTORY OUTPUT: H-Output-1
**
*Output, history, variable=PRESELECT
*End Step
** ----------------------------------------------------------------
**
** STEP: cooltocold
**
*Step, name=cooltocold, nlgeom=YES
*Static
1., 1., 1e-05, 1.
**
** PREDEFINED FIELDS
**
** Name: Predefined Field-3   Type: Temperature
*Temperature, op=NEW
** Name: Predefined Field-4   Type: Temperature
*Temperature, op=NEW
Set-7, 200.
**
** OUTPUT REQUESTS
**
*Restart, write, frequency=0
**
** FIELD OUTPUT: F-Output-1
**
*Output, field, variable=PRESELECT
**
** HISTORY OUTPUT: H-Output-1
**
*Output, history, variable=PRESELECT
*End Step
** ----------------------------------------------------------------
**
** STEP: backtoroom
**
*Step, name=backtoroom, nlgeom=YES
*Static
1., 1., 1e-05, 1.
**
** PREDEFINED FIELDS
**
** Name: Predefined Field-4   Type: Temperature
*Temperature, op=NEW
** Name: Predefined Field-5   Type: Temperature
*Temperature, op=NEW
Set-8, 298.
**
** OUTPUT REQUESTS
**
*Restart, write, frequency=0
**
** FIELD OUTPUT: F-Output-1
**
*Output, field, variable=PRESELECT
**
** HISTORY OUTPUT: H-Output-1
**
*Output, history, variable=PRESELECT
*End Step
