*Heading
** Job name: Job-2-local Model name: Model-1-local
** Generated by: Abaqus/CAE Learning Edition 2025
*Preprint, echo=NO, model=NO, history=NO, contact=NO
**
** PARTS
**
*Part, name=local
*Node
      1,   1.63867509,   1.29198742,          0.5
      2,   1.63867509,   1.29198742,           1.
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*Element, type=C3D8R
 1, 88, 89, 94, 93, 76, 77, 82, 81
 2, 89, 87, 90, 94, 77, 75, 78, 82
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*Nset, nset=Set-1
   1,   2,   3,   4,   5,   6
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*Elset, elset=Set-1, generate
 57,  80,   1
*Nset, nset=Set-2
   1,   3,   4,   5,   6,   7
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*Elset, elset=Set-2, generate
 17,  56,   1
*Nset, nset=Set-3
  1,  2, 15, 16, 17, 18
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*Elset, elset=Set-3, generate
  1,  16,   1
** Section: viasection
*Solid Section, elset=Set-3, material=metal_via
,
** Section: dielectricsection
*Solid Section, elset=Set-2, material=dielectric
,
** Section: coresection
*Solid Section, elset=Set-1, material=Core
,
*End Part
**
**
** ASSEMBLY
**
*Assembly, name=Assembly
**
*Instance, name=local-1, part=local
*End Instance
**
*Nset, nset=Set-10, instance=local-1, generate
 11,  14,   1
*Nset, nset=Set-11, instance=local-1, generate
   1,  150,    1
*Elset, elset=Set-11, instance=local-1, generate
  1,  80,   1
*Nset, nset=Set-12, instance=local-1, generate
   1,  150,    1
*Elset, elset=Set-12, instance=local-1, generate
  1,  80,   1
*Nset, nset=Set-13, instance=local-1, generate
   1,  150,    1
*Elset, elset=Set-13, instance=local-1, generate
  1,  80,   1
*Nset, nset=Set-14, instance=local-1, generate
   1,  150,    1
*Elset, elset=Set-14, instance=local-1, generate
  1,  80,   1
*Nset, nset=Set-15, instance=local-1, generate
   1,  150,    1
*Elset, elset=Set-15, instance=local-1, generate
  1,  80,   1
*Submodel, type=NODE, exteriorTolerance=0.05
Set-11,
*End Assembly
**
** MATERIALS
**
*Material, name=Core
*Elastic
70000., 0.22
*Expansion
 3.3e-06,
*Material, name=dielectric
*Elastic
5000., 0.3
*Expansion
 5e-05,
*Material, name=metal_via
*Elastic
110000., 0.34
*Expansion
 1.7e-05,
**
** PREDEFINED FIELDS
**
** Name: Predefined Field-1   Type: Temperature
*Initial Conditions, type=TEMPERATURE
Set-12, 298.
** ----------------------------------------------------------------
**
** STEP: ramptohot
**
*Step, name=ramptohot, nlgeom=YES
*Static
1., 1., 1e-05, 1.
**
** BOUNDARY CONDITIONS
**
** Name: BC-1 Type: Submodel
*Boundary, submodel, step=1
Set-11, 6, 6
**
** PREDEFINED FIELDS
**
** Name: Predefined Field-1   Type: Temperature
*Temperature, op=NEW
** Name: Predefined Field-2   Type: Temperature
*Temperature, op=NEW
Set-13, 498.
**
** OUTPUT REQUESTS
**
*Restart, write, frequency=0
**
** FIELD OUTPUT: F-Output-1
**
*Output, field, variable=PRESELECT
**
** HISTORY OUTPUT: H-Output-1
**
*Output, history, variable=PRESELECT
*End Step
** ----------------------------------------------------------------
**
** STEP: cooltocold
**
*Step, name=cooltocold, nlgeom=YES
*Static
1., 1., 1e-05, 1.
**
** PREDEFINED FIELDS
**
** Name: Predefined Field-2   Type: Temperature
*Temperature, op=NEW
** Name: Predefined Field-3   Type: Temperature
*Temperature, op=NEW
Set-14, 200.
**
** OUTPUT REQUESTS
**
*Restart, write, frequency=0
**
** FIELD OUTPUT: F-Output-1
**
*Output, field, variable=PRESELECT
**
** HISTORY OUTPUT: H-Output-1
**
*Output, history, variable=PRESELECT
*End Step
** ----------------------------------------------------------------
**
** STEP: backtoroom
**
*Step, name=backtoroom, nlgeom=YES
*Static
1., 1., 1e-05, 1.
**
** PREDEFINED FIELDS
**
** Name: Predefined Field-3   Type: Temperature
*Temperature, op=NEW
** Name: Predefined Field-4   Type: Temperature
*Temperature, op=NEW
Set-15, 298.
**
** OUTPUT REQUESTS
**
*Restart, write, frequency=0
**
** FIELD OUTPUT: F-Output-1
**
*Output, field, variable=PRESELECT
**
** HISTORY OUTPUT: H-Output-1
**
*Output, history, variable=PRESELECT
*End Step
